<?xml version="1.0"?>
<Node 	 name="Root"  gravity="0 -9.81 0"  dt="0.05"  animate="0"  >
	<Node 	 name="InstrumentGraspL"  gravity="0 -9.81 0"  >
		<MechanicalObject template="LaparoscopicRigid3" name="DOFs"  position="-5 -0.292899 0.281652 0.0338046 0.913093"  velocity="0 0 0 0"  force="0 0 0 0"  externalForce="0 0 0 0"  derivX="0 0 0 0"  restScale="1"  showObjectScale="0.1"  showIndicesScale="0.0001" />
		<Node 	 name="RigidLayer"  gravity="0 -9.81 0"  >
			<MechanicalObject template="Rigid" name="default2"  position="0 0 0 0 0 0 1"  velocity="0 0 0 0 0 0"  force="0 0 0 0 0 0"  externalForce="0 0 0 0 0 0"  derivX="0 0 0 0 0 0"  restScale="1" />
			<UniformMass template="Rigid" name="default3" />
			<LaparoscopicRigidMapping template="LaparoscopicRigid3,Rigid" name="default4"  pivot="15 2 0"  rotation="0 0.707 0 0.707"  input="@../"  output="@./" />
			<Node 	 name="articulatedObject"  gravity="0 -9.81 0"  >
				<MechanicalObject template="Vec1d" name="ArticulatedObject"  position="-0.5 0.5"  velocity="0"  force="0"  externalForce="0"  derivX="0"  restScale="1"  showObjectScale="0.1"  showIndicesScale="0.0001" />
				<ArticulatedHierarchyContainer name="default25" />
				<Node 	 name="Pince"  gravity="0 -9.81 0"  >
					<MechanicalObject template="Rigid" name="6D_Dof"  position="0 0 0 0 0 0 1 0 0 0 0 0 0 1 0 0 0 0 0 0 1"  velocity="0 0 0 0 0 0"  force="0 0 0 0 0 0"  externalForce="0 0 0 0 0 0"  derivX="0 0 0 0 0 0"  restScale="1" />
					<UniformMass template="Rigid" name="default6" />
					<ArticulatedSystemMapping template="Multi2Mapping&lt;[Vec1d,Rigid],Rigid&gt;" name="articulatedSystemMapping1"  input1="@../ArticulatedObject"  input2="@../.."  output="@6D_Dof" />
					<Node 	 name="Manche"  gravity="0 -9.81 0"  >
						<Node 	 name="Visu"  gravity="0 -9.81 0"  >
							<OglModel template="ExtVec3f" name="Visual"  fileMesh="c:/users/waleed/desktop/grasper files/johansforceps/handle.obj"  material="Default Diffuse 1 0 0 0 1 Ambient 1 0 0 0 1 Specular 0 1 1 1 1 Emissive 0 0 0 0 0 Shininess 0 45 No texture linked to the material No bump texture linked to the material "  blendEquation="GL_FUNC_ADD"  sfactor="GL_SRC_ALPHA"  dfactor="GL_ONE_MINUS_SRC_ALPHA" />
							<RigidMapping template="Rigid,ExtVec3f" name="default7"  index="0"  input="@../../../.."  output="@Visual" />
						</Node>
					</Node>
					<Node 	 name="mors_droit"  gravity="0 -9.81 0"  >
						<Node 	 name="Visu"  gravity="0 -9.81 0"  >
							<OglModel template="ExtVec3f" name="Visual"  fileMesh="mesh/johansforceps/right.obj"  material="Default Diffuse 1 0.74902 0.74902 0.74902 1 Ambient 1 0.2 0.2 0.2 1 Specular 0 1 1 1 1 Emissive 0 0 0 0 0 Shininess 0 45 No texture linked to the material No bump texture linked to the material "  blendEquation="GL_FUNC_ADD"  sfactor="GL_SRC_ALPHA"  dfactor="GL_ONE_MINUS_SRC_ALPHA" />
							<RigidMapping template="Rigid,ExtVec3f" name="default8"  index="1"  input="@.."  output="@Visual" />
						</Node>
						<Node 	 name="Collis"  gravity="0 -9.81 0"  >
							<MeshObjLoader name="loader"  filename="mesh/johansforceps/rightcoll.obj"  faceList="[ [ 0, 1, 2], [ 1, 3, 2], [ 1, 4, 3], [ 4, 5, 3], [ 4, 6, 5], [ 6, 7, 5], [ 6, 8, 7], [ 2, 3, 9], [ 3, 10, 9], [ 3, 5, 10], [ 5, 11, 10], [ 5, 7, 11], [ 7, 12, 11], [ 7, 8, 12], [ 9, 10, 13], [ 10, 14, 13], [ 10, 11, 14], [ 11, 15, 14], [ 11, 12, 15], [ 12, 16, 15], [ 12, 8, 16], [ 13, 14, 17], [ 14, 18, 17], [ 14, 15, 18], [ 15, 19, 18], [ 15, 16, 19], [ 16, 20, 19], [ 16, 8, 20], [ 17, 18, 21], [ 18, 22, 21], [ 18, 19, 22], [ 19, 23, 22], [ 19, 20, 23], [ 20, 24, 23], [ 20, 8, 24], [ 21, 22, 25], [ 22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
							<MeshTopology name="default10"  position="@loader.position"  edges="@loader.edges"  triangles="@loader.triangles"  quads="@loader.quads"  tetrahedra="@loader.tetras"  hexahedra="@loader.hexas" />
							<MechanicalObject template="Vec3d" name="CollisionRL"  position="@loader.position"  velocity="0 0 0"  force="0 0 0"  externalForce="0 0 0"  derivX="0 0 0"  restScale="1"  showObjectScale="0.1"  showIndices="0"  showIndicesScale="1e-014" />
							<TTriangleModel template="Vec3d" name="InstColl"  simulated="1"  contactStiffness="2"  group="2" />
							<RigidMapping template="Rigid,Vec3d" name="default12"  index="1"  input="@.."  output="@CollisionRL" />
						</Node>
					</Node>
					<Node 	 name="mors_gauche"  gravity="0 -9.81 0"  >
						<Node 	 name="Visu"  gravity="0 -9.81 0"  >
							<OglModel template="ExtVec3f" name="Visual"  fileMesh="mesh/johansforceps/left.obj"  material="Default Diffuse 1 0.74902 0.74902 0.74902 1 Ambient 1 0.2 0.2 0.2 1 Specular 0 1 1 1 1 Emissive 0 0 0 0 0 Shininess 0 45 No texture linked to the material No bump texture linked to the material "  blendEquation="GL_FUNC_ADD"  sfactor="GL_SRC_ALPHA"  dfactor="GL_ONE_MINUS_SRC_ALPHA" />
							<RigidMapping template="Rigid,ExtVec3f" name="default16"  index="2"  input="@.."  output="@Visual" />
						</Node>
						<Node 	 name="Collis"  gravity="0 -9.81 0"  >
							<MeshObjLoader name="loader"  filename="mesh/johansforceps/leftcoll.obj"  faceList="[ [ 0, 1, 2], [ 2, 1, 3], [ 2, 3, 4], [ 4, 3, 5], [ 4, 5, 6], [ 6, 5, 7], [ 6, 7, 8], [ 1, 9, 3], [ 3, 9, 10], [ 3, 10, 5], [ 5, 10, 11], [ 5, 11, 7], [ 7, 11, 12], [ 7, 12, 8], [ 9, 13, 10], [ 10, 13, 14], [ 10, 14, 11], [ 11, 14, 15], [ 11, 15, 12], [ 12, 15, 16], [ 12, 16, 8], [ 13, 17, 14], [ 14, 17, 18], [ 14, 18, 15], [ 15, 18, 19], [ 15, 19, 16], [ 16, 19, 20], [ 16, 20, 8], [ 17, 21, 18], [ 18, 21, 22], [ 18, 22, 19], [ 19, 22, 23], [ 19, 23, 20], [ 20, 23, 24], [ 20, 24, 8], [ 21, 25, 22], [ 22,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
							<MeshTopology name="default18"  position="@loader.position"  edges="@loader.edges"  triangles="@loader.triangles"  quads="@loader.quads"  tetrahedra="@loader.tetras"  hexahedra="@loader.hexas" />
							<MechanicalObject template="Vec3d" name="CollisionLL"  position="@loader.position"  velocity="0 0 0"  force="0 0 0"  externalForce="0 0 0"  derivX="0 0 0"  restScale="1"  showObjectScale="0.1"  showIndicesScale="0.0001" />
							<TTriangleModel template="Vec3d" name="InstColl"  simulated="1"  contactStiffness="2"  group="4" />
							<RigidMapping template="Rigid,Vec3d" name="default20"  index="2"  input="@.."  output="@CollisionLL" />
						</Node>
					</Node>
				</Node>
				<Node 	 name="articulationCenters"  gravity="0 -9.81 0"  >
					<Node 	 name="articulationCenter1"  gravity="0 -9.81 0"  >
						<ArticulationCenter name="default26"  parentIndex="0"  childIndex="1"  posOnParent="0.003 0 -1.5"  posOnChild="0 0 -1.5" />
						<Node 	 name="articulations"  gravity="0 -9.81 0"  >
							<Articulation name="default27"  axis="1 0 0"  rotation="1"  translation="0"  articulationIndex="0" />
						</Node>
					</Node>
					<Node 	 name="articulationCenter2"  gravity="0 -9.81 0"  >
						<ArticulationCenter name="default28"  parentIndex="0"  childIndex="2"  posOnParent="-0.003 0 -1.5"  posOnChild="0 0 -1.5" />
						<Node 	 name="articulations"  gravity="0 -9.81 0"  >
							<Articulation name="default29"  axis="1 0 0"  rotation="1"  translation="0"  articulationIndex="1" />
						</Node>
					</Node>
				</Node>
			</Node>
		</Node>
	</Node>
</Node>
