<?xml version="1.0"?>
<Node 	 name="Root"  dt="0.02"  animate="1"  >
	<VisualStyle name="displayFlags"  displayFlags="showVisual hideBehavior hideCollision hideMapping hideOptions" />
	<ViewerSetting fullscreen="0"  cameraMode="Perspective"  objectPickingMethod="Ray casting" />
	<DefaultPipeline name="DefaultCollisionPipeline"  verbose="0"  draw="0"  depth="6" />
	<BruteForceDetection name="Detection" />
	<MinProximityIntersection name="Proximity"  alarmDistance="0.3"  contactDistance="0.2" />
	<LCPConstraintSolver name="lCPConstraintSolver1"  group="0" />
	<DefaultContactManager name="Response"  response="default" />
	<TreeCollisionGroupManager name="Group" />
	<Node 	 name="RigidLayer"  gravity="0 -9.81 0"  >
		<NewOmniDriver name="newOmniDriver2"  listening="1"  deviceName="phantom1" />
		<MechanicalObject template="Rigid" name="RigidM"  position="0 -2.007 -5.89787 -0.163266 0 0 0.986582"  velocity="0 0 0 0 0 0"  force="0 0 0 0 0 0"  externalForce="0 0 0 0 0 0"  derivX="0 0 0 0 0 0"  restScale="1"  translation="0 0 5"  rotation="0 0 0"  scale3d="1 1 1" />
		<EulerImplicitSolver name="eulerImplicitSolver2"  rayleighStiffness="0.01"  rayleighMass="0.1" />
		<CGLinearSolver template="GraphScattered" name="linear solver"  iterations="40"  tolerance="1e-009"  threshold="1e-015" />
		<LCPForceFeedback template="Rigid" name="lCPForceFeedback7"  listening="1"  activate="1"  forceCoef="20" />
		<UncoupledConstraintCorrection template="Rigid" name="uncoupledConstraintCorrection2"  compliance="1e-005 1e-009 0 0 1e-009 0 1e-009" />
		<UniformMass template="Rigid" name="default5" />
		<Node 	 name="CollisionHandle"  gravity="0 -9.81 0"  >
			<MeshObjLoader name="loader"  filename="c:/users/waleed/desktop/fwdburninstrument/burningtool/handlelarge.obj"  trianglesGroups="Cylinder01  -1 0 232 Object01  -1 232 196"  faceList="[ [ 0, 1, 2], [ 2, 3, 0], [ 1, 4, 5], [ 5, 2, 1], [ 4, 6, 7], [ 7, 5, 4], [ 6, 8, 9], [ 9, 7, 6], [ 8, 10, 11], [ 11, 9, 8], [ 10, 12, 13], [ 13, 11, 10], [ 12, 14, 15], [ 15, 13, 12], [ 14, 16, 17], [ 17, 15, 14], [ 16, 18, 19], [ 19, 17, 16], [ 18, 20, 21], [ 21, 19, 18], [ 20, 22, 23], [ 23, 21, 20], [ 22, 24, 25], [ 25, 23, 22], [ 24, 26, 27], [ 27, 25, 24], [ 26, 28, 29], [ 29, 27, 26], [ 28, 30, 31], [ 31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
			<MeshTopology name="default8"  position="@loader.position"  edges="@loader.edges"  triangles="@loader.triangles"  quads="@loader.quads"  tetrahedra="@loader.tetras"  hexahedra="@loader.hexas" />
			<MechanicalObject template="Vec3d" name="default9"  position="@loader.position"  velocity="0 0 0"  force="0 0 0"  externalForce="0 0 0"  derivX="0 0 0"  restScale="1"  showObjectScale="0.1"  showIndicesScale="0.0001"  translation="0 0 5"  rotation="0 0 0"  scale3d="1 1 1" />
			<TTriangleModel template="Vec3d" name="default10"  moving="1"  simulated="0"  contactStiffness="10"  group="6" />
			<LineModel name="default0"  group="6" />
			<PointModel name="default1"  group="6" />
			<RigidMapping template="Rigid,Vec3d" name="default11"  input="@../"  output="@./" />
		</Node>
		<Node 	 name="CollisionTip"  gravity="0 -9.81 0"  >
			<MeshObjLoader name="loader"  filename="c:/users/waleed/desktop/fwdburninstrument/burningtool/tiplarge.obj"  trianglesGroups="Object01  -1 0 196 Cylinder03  -1 196 1764"  faceList="[ [ 0, 1, 2], [ 2, 3, 0], [ 1, 4, 5], [ 5, 2, 1], [ 4, 6, 7], [ 7, 5, 4], [ 6, 8, 9], [ 9, 7, 6], [ 8, 10, 11], [ 11, 9, 8], [ 10, 12, 13], [ 13, 11, 10], [ 12, 14, 15], [ 15, 13, 12], [ 14, 16, 17], [ 17, 15, 14], [ 16, 18, 19], [ 19, 17, 16], [ 18, 20, 21], [ 21, 19, 18], [ 20, 22, 23], [ 23, 21, 20], [ 22, 24, 25], [ 25, 23, 22], [ 24, 26, 27], [ 27, 25, 24], [ 26, 28, 29], [ 29, 27, 26], [ 28, 30, 31], [ 31, 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
			<MeshTopology name="default1"  position="@loader.position"  edges="@loader.edges"  triangles="@loader.triangles"  quads="@loader.quads"  tetrahedra="@loader.tetras"  hexahedra="@loader.hexas" />
			<MechanicalObject template="Vec3d" name="Burn"  position="@loader.position"  velocity="0 0 0"  force="0 0 0"  externalForce="0 0 0"  derivX="0 0 0"  restScale="1"  showObjectScale="0.1"  showIndicesScale="0.0001"  translation="0 0 5"  scale3d="1 1 1" />
			<TTriangleModel template="Vec3d" name="default3"  group="7" />
			<LineModel name="lineModel24"  group="7" />
			<PointModel name="pointModel25"  group="7" />
			<RigidMapping template="Rigid,Vec3d" name="default6"  input="@../"  output="@./" />
		</Node>
		<Node 	 name="Vis"  gravity="0 -9.81 0"  >
			<OglModel template="ExtVec3f" name="visual"  fileMesh="c:/users/waleed/desktop/fwdburninstrument/burningtool/handlelarge.obj"  translation="0 0 5"  rotation="0 0 0"  scale3d="1 1 1"  material="Default Diffuse 1 0.74902 0.74902 0.74902 1 Ambient 1 0.2 0.2 0.2 1 Specular 0 1 1 1 1 Emissive 0 0 0 0 0 Shininess 0 45 No texture linked to the material No bump texture linked to the material "  blendEquation="GL_FUNC_ADD"  sfactor="GL_SRC_ALPHA"  dfactor="GL_ONE_MINUS_SRC_ALPHA" />
			<RigidMapping template="Rigid,ExtVec3f" name="default7"  input="@../"  output="@./" />
		</Node>
		<Node 	 name="VisTip"  gravity="0 -9.81 0"  >
			<OglModel template="ExtVec3f" name="visualtip"  fileMesh="c:/users/waleed/desktop/fwdburninstrument/burningtool/tiplarge.obj"  translation="0 0 5"  scale3d="1 1 1"  material="Default Diffuse 1 0.74902 0.74902 0.74902 1 Ambient 1 0.2 0.2 0.2 1 Specular 0 1 1 1 1 Emissive 0 0 0 0 0 Shininess 0 45 No texture linked to the material No bump texture linked to the material "  blendEquation="GL_FUNC_ADD"  sfactor="GL_SRC_ALPHA"  dfactor="GL_ONE_MINUS_SRC_ALPHA" />
			<RigidMapping template="Rigid,ExtVec3f" name="default8"  input="@../"  output="@./" />
		</Node>
	</Node>
</Node>
