<?xml version="1.0"?>
<Node 	 name="Root"  dt="0.02"  animate="1"  >
	<VisualStyle name="displayFlags"  displayFlags="showVisual hideBehavior hideCollision hideMapping hideOptions" />
	<DefaultPipeline name="DefaultCollisionPipeline"  verbose="0"  draw="0"  depth="6" />
	<BruteForceDetection name="Detection" />
	<MinProximityIntersection name="Proximity"  alarmDistance="0.3"  contactDistance="0.2" />
	<DefaultContactManager name="Response"  response="FrictionContact" />
	<EulerImplicitSolver name="eulerImplicitSolver2" />
	<CGLinearSolver template="GraphScattered" name="cGLinearSolver1" />
	<FreeMotionAnimationLoop name="freeMotionAnimationLoop0" />
	<LCPConstraintSolver name="lCPConstraintSolver1"  group="0" />
	<TreeCollisionGroupManager name="Group" />
	<Node 	 name="Liver"  >
		<EulerImplicitSolver name="cg_odesolver"  printLog="0" />
		<CGLinearSolver template="CompressedRowSparseMatrix2d" name="cGLinearSolver3" />
		<MeshGmshLoader name="loader"  filename="c:/users/rizwan/desktop/newmodels/liverfinal.obj" />
		<MeshTopology name="meshTopology1"  position="@loader.position"  edges="@loader.edges"  triangles="@loader.triangles"  quads="@loader.quads"  tetrahedra="@loader.tetras"  hexahedra="@loader.hexas" />
		<MechanicalObject template="Vec2d" name="mObject4"  position="0 0"  velocity="0 0"  force="0 0"  externalForce="0 0"  derivX="0 0"  restScale="1"  showObjectScale="0.001"  showIndicesScale="0.1"  rotation="1 0 0"  scale3d="1 1 1" />
		<Node 	 name="Visu"  >
			<OglModel template="ExtVec3f" name="VisualModel"  fileMesh="c:/users/waleed/desktop/finalscene/liverfinal.obj"  texturename="c:/users/waleed/desktop/livertexture.jpg"  translation="-1 -400 -410"  rotation="0 90 0"  scale3d="10 10 10"  material="Default Diffuse 1 1 0 0 1 Ambient 1 0.2 0 0 1 Specular 0 1 0 0 1 Emissive 0 1 0 0 1 Shininess 0 45 No texture linked to the material No bump texture linked to the material "  blendEquation="GL_FUNC_ADD"  sfactor="GL_SRC_ALPHA"  dfactor="GL_ONE_MINUS_SRC_ALPHA" />
		</Node>
		<Node 	 name="Surf"  >
			<SphereLoader name="sphereLoader1"  filename="mesh/liver.sph"  position="-4 1.25 0 -4 1.25 1 -3 1.25 2.5 -4 2.25 -1 -4 2.25 0 -4 2.25 1 -3 2.25 -1 -3 2.25 0 -3 2.25 1 -3 2.25 2 -2 2.25 2 -4 3.25 -1 -4 3.25 0 -4 3.25 1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"  listRadius="0.85 0.85 0.35 0.85 0.85 0.85 0.85 0.85 0.85 0.85 0.85 0.85 0.85 0.85 0.85 0.85 0.85 0.85 0.85 0.85 0.85 0.85 0.85 0.85 0.85 0.85 0.85 0.85 0.85 0.85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" />
			<MechanicalObject template="Vec3d" name="mObject1"  position="@[-1].position"  velocity="0 0 0"  force="0 0 0"  externalForce="0 0 0"  derivX="0 0 0"  restScale="1"  translation="0 0 0" />
			<TSphereModel template="Vec3d" name="CollisionModel"  listRadius="@[-2].listRadius" />
		</Node>
	</Node>
	<Node 	 name="Body"  >
		<Node 	 name="Root"  gravity="0 -10 0"  dt="0.02"  animate="0"  >
			<VisualStyle name="displayFlags"  displayFlags="showVisual hideBehavior hideCollision hideMapping hideOptions" />
			<BruteForceDetection name="Detection" />
			<MinProximityIntersection name="Proximity"  alarmDistance="0.3"  contactDistance="0.2" />
			<DefaultContactManager name="Response"  response="default" />
			<TreeCollisionGroupManager name="Group" />
			<Node 	 name="Body"  activated="1"  >
				<MeshObjLoader name="meshObjLoader1"  filename="c:/users/waleed/desktop/salpingectomy/objmodels/floordown.obj"  trianglesGroups="Plane01  -1 0 1360"  faceList="[ [ 0, 1, 2], [ 2, 1, 3], [ 2, 3, 4], [ 4, 3, 5], [ 4, 5, 6], [ 6, 5, 7], [ 6, 7, 8], [ 8, 7, 9], [ 10, 0, 11], [ 11, 0, 2], [ 11, 2, 12], [ 12, 2, 4], [ 12, 4, 13], [ 13, 4, 6], [ 13, 6, 14], [ 14, 6, 8], [ 15, 10, 16], [ 16, 10, 11], [ 16, 11, 17], [ 17, 11, 12], [ 17, 12, 18], [ 18, 12, 13], [ 18, 13, 19], [ 19, 13, 14], [ 20, 15, 21], [ 21, 15, 16], [ 21, 16, 22], [ 22, 16, 17], [ 22, 17, 23], [ 23, 17, 18], [ 23, 18, 24], [ 24,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
				<MeshTopology name="meshTopology2"  position="@meshObjLoader1.position"  edges="@meshObjLoader1.edges"  triangles="@meshObjLoader1.triangles"  quads="@meshObjLoader1.quads"  tetrahedra="@meshObjLoader1.tetras"  hexahedra="@meshObjLoader1.hexas" />
				<MechanicalObject template="Vec3d" name="mObject4"  position="@meshObjLoader1.position"  velocity="0 0 0"  force="0 0 0"  externalForce="0 0 0"  derivX="0 0 0"  restScale="1"  showObjectScale="0.1"  showIndicesScale="0.0001"  translation="-2 -4 -6"  scale3d="0.125 0.1 0.125" />
				<LineModel name="lineModel3"  moving="0"  simulated="0" />
				<OglModel template="ExtVec3f" name="box"  fileMesh="c:/users/waleed/desktop/29apr-scenes/bodyfinal.obj"  translation="-50 -200 -370"  rotation="0 0 0"  scale3d="10 10 10"  material="Default Diffuse 1 0.74902 0.74902 0.74902 1 Ambient 1 0.2 0.2 0.2 1 Specular 0 1 1 1 1 Emissive 0 0 0 0 0 Shininess 0 45 No texture linked to the material No bump texture linked to the material "  blendEquation="GL_FUNC_ADD"  sfactor="GL_SRC_ALPHA"  dfactor="GL_ONE_MINUS_SRC_ALPHA" />
			</Node>
		</Node>
	</Node>
	<Node 	 name="Stylus"  >
		<MechanicalObject template="LaparoscopicRigid3" name="mObject0"  position="0 0 0 0 1"  velocity="0 0 0 0"  force="0 0 0 0"  externalForce="0 0 0 0"  derivX="0 0 0 0"  restScale="1" />
		<Node 	 name="Rigid Layer"  >
			<MechanicalObject template="Vec2d" name="mObject2"  position="0 0"  velocity="0 0"  force="0 0"  externalForce="0 0"  derivX="0 0"  restScale="1" />
			<EulerImplicitSolver name="eulerImplicitSolver2"  rayleighStiffness="0.01"  rayleighMass="0.1" />
			<CGLinearSolver template="GraphScattered" name="linear solver"  iterations="40"  tolerance="1e-009"  threshold="1e-015" />
			<Node 	 name="visu"  >
				<OglModel template="ExtVec3f" name="oglModel4"  fileMesh="c:/users/waleed/desktop/fyp/sofatutorial/objectfiles/blade_instrument_handlept.obj"  material="Default Diffuse 1 0.74902 0.74902 0.74902 1 Ambient 1 0.2 0.2 0.2 1 Specular 0 1 1 1 1 Emissive 0 0 0 0 0 Shininess 0 45 No texture linked to the material No bump texture linked to the material "  blendEquation="GL_FUNC_ADD"  sfactor="GL_SRC_ALPHA"  dfactor="GL_ONE_MINUS_SRC_ALPHA" />
			</Node>
			<Node 	 name="coll"  >
				<MeshTopology name="meshTopology5"  fileTopology="c:/users/waleed/desktop/fyp/sofatutorial/objectfiles/blade_instrument_handlept.obj" />
				<MechanicalObject template="Vec3d" name="mObject60"  position="0 0 0"  velocity="0 0 0"  force="0 0 0"  externalForce="0 0 0"  derivX="0 0 0"  restScale="1" />
				<TSphereModel template="Vec3d" name="tSphereModel62" />
			</Node>
		</Node>
	</Node>
	<Node 	 name="GallBlader"  >
		<Node 	 name="visu"  >
			<OglModel template="ExtVec3f" name="oglModel0"  fileMesh="c:/users/waleed/desktop/finalscene/gallbladderfinal.obj"  translation="-1 -400 -410"  rotation="0 90 0"  scale3d="10 10 10"  material="Default Diffuse 1 0.74902 0.74902 0.74902 1 Ambient 1 0.2 0.2 0.2 1 Specular 0 1 1 1 1 Emissive 0 0 0 0 0 Shininess 0 45 No texture linked to the material No bump texture linked to the material "  blendEquation="GL_FUNC_ADD"  sfactor="GL_SRC_ALPHA"  dfactor="GL_ONE_MINUS_SRC_ALPHA" />
		</Node>
	</Node>
	<Node 	 name="Membrane"  >
	</Node>
	<Node 	 name="Intestines"  >
		<OglModel template="ExtVec3f" name="oglModel0"  fileMesh="c:/users/waleed/desktop/29apr-scenes/intestines.obj"  texturename="c:/users/waleed/desktop/humanintestine2.jpg"  translation="-50 -200 -370"  scale3d="10 10 10"  material="Default Diffuse 1 0.74902 0.74902 0.74902 1 Ambient 1 0.2 0.2 0.2 1 Specular 0 1 1 1 1 Emissive 0 0 0 0 0 Shininess 0 45 No texture linked to the material No bump texture linked to the material "  blendEquation="GL_FUNC_ADD"  sfactor="GL_SRC_ALPHA"  dfactor="GL_ONE_MINUS_SRC_ALPHA" />
	</Node>
</Node>
